<?xml version="1.0"?>
<?xml-stylesheet type="text/xsl" href="http://jsbsim.sourceforge.net/JSBSim.xsl"?>
<fdm_config xmlns:xsi="http://www.w3.org/2001/XMLSchema-instance" name="AAE 451 Team 1" version="2.0" release="TRIAL" xsi:noNamespaceSchemaLocation="http://jsbsim.sourceforge.net/JSBSim.xsd">
  <fileheader>
    <author> AAE 451 Team 1 </author>
    <filecreationdate> 2021-3-24 </filecreationdate>
    <version> 1.0 </version>
    <license>
      <licenseName>GPL (General Public License)</licenseName>
      <licenseURL>http://www.gnu.org/licenses/gpl.html</licenseURL>
    </license>
    <description> Models a XV-3 </description>
  </fileheader>
  <!-- ALL VALUES DEFINED FROM 8FT IN FRONT OF NOSE-->
  <metrics>
    <wingarea unit="FT2">  373.615 </wingarea>
    <wingspan unit="FT">   52 </wingspan>
    <wing_incidence>    0   </wing_incidence>
    <chord unit="FT">   7.184 </chord> <!-- Cbar (8.95+5.785)/2 = 7.3675, using Thomas's value -->
    <htailarea unit="FT2">   116.2690 </htailarea>
    <htailarm unit="FT">   20.4 </htailarm> <!-- CG to AC -->
    <vtailarea unit="FT2">   67.9979 </vtailarea>
    <vtailarm unit="FT">   20.5 </vtailarm> <!-- CG to AC -->
    <location name="AERORP" unit="FT"> <!-- neutral point (location where aerodynamic forces act)-->
      <x> 27.53 </x>
      <y>   0.00 </y>
      <z>   0.00 </z>
    </location>
    <location name="EYEPOINT" unit="FT"> <!-- where G-forces are computed for the pilot -->
      <x> 11.5 </x>
      <y>   0.00 </y>
      <z>  3 </z>
    </location>
    <location name="VRP" unit="IN"> <!-- the world position reported by JSBSim to FlightGear is for this location in the structural frame-->
      <x>0</x>
      <y>0</y>
      <z>20</z>
    </location>
  </metrics>
  <!-- All Locations Measured from 8ft in front of nose-->
  <mass_balance>
    <ixx unit="SLUG*FT2">     39078.458 </ixx>
    <iyy unit="SLUG*FT2">     52433.260 </iyy>
    <izz unit="SLUG*FT2">     87170.629 </izz>
    <emptywt unit="LBS">     12813 </emptywt> <!-- from CAD -->
    <location name="CG" unit="FT">
      <x> 25.8 </x> <!--Empty CG (Loaded CG = 26.478FT)-->
      <y> 0.00 </y>
      <z> -1.14 </z>
    </location>
  </mass_balance>
  <ground_reactions>
    <contact type="BOGEY" name="NOSE">
      <location unit="IN">
        <x>  79.85 </x>
        <y>   0.00 </y>
        <z> -73.70 </z>
      </location>
      <static_friction>  0.80 </static_friction>
      <dynamic_friction> 0.50 </dynamic_friction>
      <rolling_friction> 0.02 </rolling_friction>
      <spring_coeff unit="LBS/FT">      10000.00 </spring_coeff>
      <damping_coeff unit="LBS/FT/SEC">  2000.00 </damping_coeff>
      <max_steer unit="DEG"> 45.00 </max_steer>
      <brake_group>NONE</brake_group>
      <retractable>1</retractable>
    </contact>
    <contact type="BOGEY" name="LEFT_MAIN">
      <location unit="IN">
        <x> 383.26 </x>
        <y> -77.92 </y>
        <z> -73.70 </z>
      </location>
      <static_friction>  0.8 </static_friction> <!-- Originally 0.8-->
      <dynamic_friction> 0.50 </dynamic_friction>
      <rolling_friction> 0.02 </rolling_friction>
      <spring_coeff unit="LBS/FT">      30000.00 </spring_coeff>
      <damping_coeff unit="LBS/FT/SEC"> 6000.00 </damping_coeff>
      <max_steer unit="DEG">0</max_steer>
      <brake_group>LEFT</brake_group>
      <retractable>1</retractable>
    </contact>
    <contact type="BOGEY" name="RIGHT_MAIN">
      <location unit="IN">
        <x> 383.26 </x>
        <y>  77.92 </y>
        <z> -73.70 </z>
      </location>
      <static_friction>  0.8 </static_friction> <!-- Originally 0.8-->
      <dynamic_friction> 0.50 </dynamic_friction>
      <rolling_friction> 0.02 </rolling_friction>
      <spring_coeff unit="LBS/FT">      30000.00 </spring_coeff>
      <damping_coeff unit="LBS/FT/SEC"> 6000.00 </damping_coeff>
      <max_steer unit="DEG">0</max_steer>
      <brake_group>RIGHT</brake_group>
      <retractable>1</retractable>
    </contact>
    <contact type="STRUCTURE" name="LEFT_WING">
      <location unit="IN">
        <x> 368.52 </x>
        <y> -17.55 </y>
        <z> -15.36 </z>
      </location>
      <static_friction>  0.80 </static_friction>
      <dynamic_friction> 0.50 </dynamic_friction>
      <spring_coeff unit="LBS/FT">      59535.00 </spring_coeff>
      <damping_coeff unit="LBS/FT/SEC"> 11907.00 </damping_coeff>
    </contact>
    <contact type="STRUCTURE" name="RIGHT_WING">
      <location unit="IN">
        <x> 368.52 </x>
        <y>  17.55 </y>
        <z> -15.36 </z>
      </location>
      <static_friction>  0.80 </static_friction>
      <dynamic_friction> 0.50 </dynamic_friction>
      <spring_coeff unit="LBS/FT">      59535.00 </spring_coeff>
      <damping_coeff unit="LBS/FT/SEC"> 11907.00 </damping_coeff>
    </contact>
  </ground_reactions>
  <!--===================-->
  <!-- PROPULSION -->
  <!--===================-->
  <propulsion>
    <!-- MAIN ENGINES -->
    <engine file="PW-530">
      <location unit="IN">
        <x> 283.6 </x>
        <y>  47.93 </y>
        <z>   -58.16 </z>
      </location>
      <orient unit="DEG">
        <pitch> 0.00 </pitch>
        <roll>   0.00 </roll>
        <yaw>   0.00 </yaw>
      </orient>
      <feed>0</feed>
      <feed>1</feed>
      <feed>2</feed>
      <feed>3</feed>
      <feed>4</feed>
      <thruster file="direct">
        <location unit="IN">
          <x> 283.6 </x>
          <y>   47.93 </y>
          <z>   -58.16 </z>
        </location>
        <orient unit="DEG">
          <pitch> 0.00 </pitch>
          <roll>   0.00 </roll>
          <yaw>   0.00 </yaw>
        </orient>
      </thruster>
    </engine>
    <engine file="PW-530">
      <location unit="IN">
        <x> 283.6 </x>
        <y>  -47.93 </y>
        <z>   -58.16 </z>
      </location>
      <orient unit="DEG">
        <pitch> 0.00 </pitch>
        <roll>   0.00 </roll>
        <yaw>   0.00 </yaw>
      </orient>
      <feed>0</feed>
      <feed>1</feed>
      <feed>2</feed>
      <feed>3</feed>
      <feed>4</feed>
      <thruster file="direct">
        <location unit="IN">
          <x> 283.6 </x>
          <y>   -47.93 </y>
          <z>   -58.16 </z>
        </location>
        <orient unit="DEG">
          <pitch> 0.00 </pitch>
          <roll>   0.00 </roll>
          <yaw>   0.00 </yaw>
        </orient>
      </thruster>
    </engine>
    <engine file="PW-530">
      <location unit="IN">
        <x> 294.6 </x>
        <y>  170.33 </y>
        <z>   -53.16 </z>
      </location>
      <orient unit="DEG">
        <pitch> 0.00 </pitch>
        <roll>   0.00 </roll>
        <yaw>   0.00 </yaw>
      </orient>
      <feed>0</feed>
      <feed>1</feed>
      <feed>2</feed>
      <feed>3</feed>
      <feed>4</feed>
      <thruster file="direct">
        <location unit="IN">
          <x> 294.6 </x>
          <y>  170.33 </y>
          <z>   -53.16 </z>
        </location>
        <orient unit="DEG">
          <pitch> 0.00 </pitch>
          <roll>   0.00 </roll>
          <yaw>   0.00 </yaw>
        </orient>
      </thruster>
    </engine>
    <engine file="PW-530">
      <location unit="IN">
        <x> 294.6 </x>
        <y>  -170.33 </y>
        <z>   -53.16 </z>
      </location>
      <orient unit="DEG">
        <pitch> 0.00 </pitch>
        <roll>   0.00 </roll>
        <yaw>   0.00 </yaw>
      </orient>
      <feed>0</feed>
      <feed>1</feed>
      <feed>2</feed>
      <feed>3</feed>
      <feed>4</feed>
      <thruster file="direct">
        <location unit="IN">
          <x> 294.6 </x>
          <y>  -170.33 </y>
          <z>   -53.16 </z>
        </location>
        <orient unit="DEG">
          <pitch> 0.00 </pitch>
          <roll>   0.00 </roll>
          <yaw>   0.00 </yaw>
        </orient>
      </thruster>
    </engine>
    <!-- LIFT FANS -->
    <engine file="liftfan"> <!-- Right Inner -->
      <location unit="IN">
        <x> 324 </x>
        <y>   86.54 </y>
        <z>   -20.44 </z>
      </location>
      <orient unit="DEG">
        <pitch> 90.00 </pitch>
        <roll>   0.00 </roll>
        <yaw>   0.00 </yaw>
      </orient>
      <feed>0</feed>
      <feed>1</feed>
      <feed>2</feed>
      <feed>3</feed>
      <feed>4</feed>
      <thruster file="direct">
        <location unit="IN">
          <x> 324 </x>
          <y>   86.54 </y>
          <z>   -20.44 </z>
        </location>
        <orient unit="DEG">
          <pitch> 90.00 </pitch>
          <roll>   0.00 </roll>
          <yaw>   0.00 </yaw>
        </orient>
      </thruster>
    </engine>
    <engine file="liftfan"> <!-- Left Inner -->
      <location unit="IN">
        <x> 324 </x>
        <y>   -86.54 </y>
        <z>   -20.44 </z>
      </location>
      <orient unit="DEG">
        <pitch> 90.00 </pitch>
        <roll>   0.00 </roll>
        <yaw>   0.00 </yaw>
      </orient>
      <feed>0</feed>
      <feed>1</feed>
      <feed>2</feed>
      <feed>3</feed>
      <feed>4</feed>
      <thruster file="direct">
        <location unit="IN">
          <x> 324 </x>
          <y>   -86.54 </y>
          <z>   -20.44 </z>
        </location>
        <orient unit="DEG">
          <pitch> 90.00 </pitch>
          <roll>   0.00 </roll>
          <yaw>   0.00 </yaw>
        </orient>
      </thruster>
    </engine>
    <engine file="liftfan"> <!-- Right Outer -->
      <location unit="IN">
        <x> 328.2 </x>
        <y>   130.13 </y>
        <z>   -20.44 </z>
      </location>
      <orient unit="DEG">
        <pitch> 90.00 </pitch>
        <roll>   0.00 </roll>
        <yaw>   0.00 </yaw>
      </orient>
      <feed>0</feed>
      <feed>1</feed>
      <feed>2</feed>
      <feed>3</feed>
      <feed>4</feed>
      <thruster file="direct">
        <location unit="IN">
          <x> 328.2 </x>
          <y>   130.13 </y>
          <z>   -20.44 </z>
        </location>
        <orient unit="DEG">
          <pitch> 90.00 </pitch>
          <roll>   0.00 </roll>
          <yaw>   0.00 </yaw>
        </orient>
      </thruster>
    </engine>
    <engine file="liftfan"> <!-- Left Outer -->
      <location unit="IN">
        <x> 328.2 </x>
        <y>   -130.13 </y>
        <z>   -20.44 </z>
      </location>
      <orient unit="DEG">
        <pitch> 90.00 </pitch>
        <roll>   0.00 </roll>
        <yaw>   0.00 </yaw>
      </orient>
      <feed>0</feed>
      <feed>1</feed>
      <feed>2</feed>
      <feed>3</feed>
      <feed>4</feed>
      <thruster file="direct">
        <location unit="IN">
          <x> 328.2 </x>
          <y>   -130.13 </y>
          <z>   -20.44 </z>
        </location>
        <orient unit="DEG">
          <pitch> 90.00 </pitch>
          <roll>   0.00 </roll>
          <yaw>   0.00 </yaw>
        </orient>
      </thruster>
    </engine>
    <!-- RCS -->
    <engine file="RCS">
      <location unit="IN">
        <x> 108 </x>
        <y>  0 </y>
        <z>   0 </z>
      </location>
      <orient unit="DEG">
        <pitch> 90.00 </pitch>
        <roll>   0.00 </roll>
        <yaw>   0.00 </yaw>
      </orient>
      <feed>0</feed>
      <feed>1</feed>
      <feed>2</feed>
      <feed>3</feed>
      <feed>4</feed>
      <thruster file="direct">
        <location unit="IN">
          <x> 108 </x>
          <y>  0 </y>
          <z>   0 </z>
        </location>
        <orient unit="DEG">
          <pitch> 90.00 </pitch>
          <roll>   0.00 </roll>
          <yaw>   0.00 </yaw>
        </orient>
      </thruster>
    </engine>
    <!-- FUEL TANKS-->
    <!-- Wing Tank number 0 -->
    <tank type="FUEL">
      <location unit="FT">
        <x> 30.43 </x>
        <y>  18.06 </y>
        <z> 1.49 </z>
      </location>
      <capacity unit="LBS"> 299.7 </capacity>
      <contents unit="LBS"> 299.7 </contents>
    </tank>
    <!-- Wing Tank number 1 -->
    <tank type="FUEL">
      <location unit="FT">
        <x> 30.43 </x>
        <y>  -18.06 </y>
        <z> 1.49 </z>
      </location>
      <capacity unit="LBS"> 299.7 </capacity>
      <contents unit="LBS"> 299.7 </contents>
    </tank>
    <!-- Wing Tank number 2 -->
    <tank type="FUEL">
      <location unit="FT">
        <x> 27.29 </x>
        <y>  3.5 </y>
        <z> 1.55 </z>
      </location>
      <capacity unit="LBS"> 1039 </capacity>
      <contents unit="LBS"> 1039 </contents>
    </tank>
    <!-- Wing Tank number 3 -->
    <tank type="FUEL">
      <location unit="FT">
        <x> 27.29 </x>
        <y> -3.5 </y>
        <z> 1.55 </z>
      </location>
      <capacity unit="LBS"> 1039 </capacity>
      <contents unit="LBS"> 1039 </contents>
    </tank>
    <!-- Empennage Tank number 4 -->
    <tank type="FUEL">
      <location unit="FT">
        <x> 37.05 </x>
        <y> 0 </y>
        <z> 1.29 </z>
      </location>
      <capacity unit="LBS"> 422.6 </capacity>
      <contents unit="LBS"> 422.6 </contents>
    </tank>
  </propulsion>
  <!--===================-->
  <!-- FLIGHT CONTROL -->
  <!--===================-->
  <flight_control>
    <property value="280" description="heading command">ap/heading-cmd-deg</property>
    <property value="675" description="heading command">ap/speed-cmd-fps</property>
    <property value="0" description="enable roll loop">ap/roll-enable</property>
    <property value="0" description="enable speed loop">ap/speed-enable</property>
    <property value="0" description="enable pitch loop">ap/pitch-enable</property>
    <property value="0" description="enable yaw loop">ap/yaw-enable</property>
    <property value="0" description="enable altitude loop">ap/h-cruise-enable</property>
    <property value="0" description="enable altitude loop">ap/h-hover-enable</property>
    <property value="596" description="altitude above sea level setpoint ft">ap/h-sl-cmd-ft</property>

    <function name="ap/liftfan-roll-mix">
      <table>
          <independentVar>velocities/vt-fps</independentVar>
          <tableData>
              100 1
              200 0
          </tableData>
      </table>
    </function>

    <function name="ap/liftfan-pitch-mix">
      <table>
          <independentVar>velocities/vt-fps</independentVar>
          <tableData>
              140  1
              141  0
              1000 0
          </tableData>
      </table>
    </function>

    <function name="ap/elevator-pitch-mix">
      <table>
          <independentVar>velocities/vt-fps</independentVar>
          <tableData>
              140  0
              141  20
              1000 20
          </tableData>
      </table>
    </function>

    <function name="ap/aileron-roll-mix">
      <table>
          <independentVar>velocities/vt-fps</independentVar>
          <tableData>
              140  0
              141  20
              1000 20
          </tableData>
      </table>
    </function>

    <function name="ap/liftfan-yaw-mix">
      <table>
          <independentVar>velocities/vt-fps</independentVar>
          <tableData>
              100 1
              200 0
          </tableData>
      </table>
    </function>

    <function name="ap/heading-error-to-phi-deg-cmd">
      <table>
          <independentVar>velocities/vt-fps</independentVar>
          <tableData>
              100 0
              200 3
          </tableData>
      </table>
    </function>

    <function name="ap/h-error-to-theta">
      <table>
          <independentVar>velocities/vt-fps</independentVar>
          <tableData>
              100 0
              200 0.5
          </tableData>
      </table>
    </function>

    <function name="ap/heading-error-to-vane-deg">
      <table>
          <independentVar>velocities/vt-fps</independentVar>
          <tableData>
              100 1
              200 0
          </tableData>
      </table>
    </function>


    <function name="ap/lift-fan-thrust-mix">
      <table>
          <independentVar>velocities/vt-fps</independentVar>
          <tableData>
              250 1  <!-- adjusted for moment balance-->
              300 0
          </tableData>
      </table>
    </function>

    <function name="ap/rcs-thrust-mix">
      <table>
          <independentVar>velocities/vt-fps</independentVar>
          <tableData>
              250 0.88  <!-- adjusted for moment balance-->
              300 0
          </tableData>
      </table>
    </function>

    <function name="ap/throttle-trim">
      <table>
          <independentVar>velocities/vt-fps</independentVar>
          <tableData>
            0   0.864
            100 0.836
            200 0.698
            300 0.554
            400 0.428
            500 0.449
            600 0.478
          </tableData>
      </table>
    </function>

    <function name="ap/elevator-trim">
      <table>
          <independentVar>velocities/vt-fps</independentVar>
          <tableData>
              100 0.0
              200 0.0
              300 0.0
              400 0.0
              500 0.0
              600 0.0
          </tableData>
      </table>
    </function>

    <function name="ap/aileron-trim">
      <table>
          <independentVar>velocities/vt-fps</independentVar>
          <tableData>
              150 0
          </tableData>
      </table>
    </function>

    <function name="ap/vane-trim">
      <table>
          <independentVar>velocities/vt-fps</independentVar>
          <tableData>
              150 0
          </tableData>
      </table>
    </function>

    <function name="ap/theta-deg-trim">
      <table>
          <independentVar>velocities/vt-fps</independentVar>
          <tableData>
            0  0
            10  0.0
            50  0.0
            250 0.0
            400 0.0
            500 0.0
            600 0.0
          </tableData>
      </table>
    </function>

    <function name="ap/phi-deg-trim">
      <table>
          <independentVar>velocities/vt-fps</independentVar>
          <tableData>
              100  0
          </tableData>
      </table>
    </function>

    <function name="ap/speed-trim">
      <table>
          <independentVar>velocities/vt-fps</independentVar>
          <tableData>
              150 0
          </tableData>
      </table>
    </function>

    <function name="ap/roll-kp">
      <table>
        <independentVar>velocities/vt-fps</independentVar>
        <tableData>
            0    0.01
            139  0.002
            140  0.002
        </tableData>
      </table>
    </function>

    <function name="ap/roll-ki">
      <table>
        <independentVar>velocities/vt-fps</independentVar>
        <tableData>
            0    0.0
            139  0.0
            140  0.0
        </tableData>
      </table>
    </function>

    <function name="ap/roll-kd">
      <table>
        <independentVar>velocities/vt-fps</independentVar>
        <tableData>
            0    0.01
            139  0.001
            140  0.001
        </tableData>
      </table>
    </function>

    <function name="ap/pitch-kp">
      <table>
        <independentVar>velocities/vt-fps</independentVar>
        <tableData>
            0    0.06
            139  0.06
            140  0.15
        </tableData>
      </table>
    </function>

    <function name="ap/pitch-ki">
      <table>
        <independentVar>velocities/vt-fps</independentVar>
        <tableData>
            0    0.0001
            139  0.0001
            140  0.01
        </tableData>
      </table>
    </function>

    <function name="ap/pitch-kd">
      <table>
        <independentVar>velocities/vt-fps</independentVar>
        <tableData>
            0    0.06
            139  0.06
            140  0.07
        </tableData>
      </table>
    </function>

    <function name="ap/yaw-kp">
      <table>
        <independentVar>velocities/vt-fps</independentVar>
        <tableData>
            0    0.1
            139  0.1
            140  0.0
        </tableData>
      </table>
    </function>

    <function name="ap/yaw-ki">
      <table>
        <independentVar>velocities/vt-fps</independentVar>
        <tableData>
            0    0.0
            139  0.0
            140  0.0
        </tableData>
      </table>
    </function>

    <function name="ap/yaw-kd">
      <table>
        <independentVar>velocities/vt-fps</independentVar>
        <tableData>
            0    0.1
            139  0.1
            140  0.0
        </tableData>
      </table>
    </function>

    <function name="ap/altitude-kp">
      <table>
        <independentVar>velocities/vt-fps</independentVar>
        <tableData>
            0    0.015
            139  0.015
            140  0.005
        </tableData>
      </table>
    </function>

    <function name="ap/altitude-ki">
      <table>
        <independentVar>velocities/vt-fps</independentVar>
        <tableData>
            0    0.0001
            139  0.0001
            140  0.0001
        </tableData>
      </table>
    </function>

    <function name="ap/altitude-kd">
      <table>
        <independentVar>velocities/vt-fps</independentVar>
        <tableData>
            0    0.02
            139  0.02
            140  0.08
        </tableData>
      </table>
    </function>

    <function name="ap/speed-kp">
      <table>
        <independentVar>velocities/vt-fps</independentVar>
        <tableData>
            0    0.02
            139  0.02
            140  0.1
        </tableData>
      </table>
    </function>

    <function name="ap/speed-ki">
      <table>
        <independentVar>velocities/vt-fps</independentVar>
        <tableData>
            0    0.0001
            139  0.0001
            140  0.0001
        </tableData>
      </table>
    </function>

    <function name="ap/speed-kd">
      <table>
        <independentVar>velocities/vt-fps</independentVar>
        <tableData>
            0    0.015
            139  0.015
            140  0.01
        </tableData>
      </table>
    </function>

    <channel name="Gear">
      <pure_gain>
        <input>gear/gear-cmd-norm</input>
        <gain>1</gain>
        <output>gear/gear-pos-norm</output>
      </pure_gain>
    </channel>


    <!-- ############################################### -->
    <!-- ################ CONTROLLERS ################## -->
    <!-- ############################################### -->
    <channel name="Roll">
      <summer name="ap/heading-roll-error-deg">
        <input>ap/heading-cmd-deg</input>
        <input>-attitude/psi-deg</input>
      </summer>
      <pure_gain name="ap/phi-deg-cmd">
        <input>ap/heading-roll-error-deg</input>
        <gain>ap/heading-error-to-phi-deg-cmd</gain>
        <clipto>
            <min>-10</min>
            <max>10</max>
        </clipto>
      </pure_gain>
      <summer name="ap/heading-roll-error-scaled">
        <input>ap/phi-deg-cmd</input>
        <input>-attitude/phi-deg</input>
      </summer>
      <pid name='ap/roll-cruise-pid'>
        <input>ap/heading-roll-error-scaled</input>
        <kp> ap/roll-kp </kp>
        <ki> ap/roll-ki </ki>
        <kd> ap/roll-kd </kd>
        <clipto>
          <min>-1</min>
          <max>1</max>
        </clipto>
      </pid>
      <summer name="ap/roll-error">
        <input>ap/phi-deg-trim</input>
        <input>-attitude/phi-deg</input>
      </summer>
      <pid name="ap/roll-hover-pid">
        <input>ap/roll-error</input>
        <kp> ap/roll-kp </kp>
        <ki> ap/roll-ki </ki>
        <kd> ap/roll-kd </kd>
        <clipto>
          <min>-0.1</min>
          <max>0.1</max>
        </clipto>
      </pid>
      <switch name="ap/roll-pid">
        <default value="ap/roll-hover-pid"/>
        <test value="ap/roll-cruise-pid">
          velocities/vt-fps >= 140
        </test>
      </switch>
      <summer name="ap/roll-auto">
        <input>ap/aileron-trim</input>
        <input>ap/roll-pid</input>
      </summer>
      <switch name="ap/aileron-cmd-norm">
        <default value="fcs/aileron-cmd-norm"/>
        <test value="ap/roll-auto">
          ap/roll-enable == 1
        </test>
      </switch>
    </channel>

    <channel name="Pitch">
      <summer name="ap/pitch-error">
        <input>ap/theta-deg-trim</input>
        <input>-attitude/theta-deg</input>
      </summer>
      <pid name="ap/pitch-pid">
        <input>ap/pitch-error</input>
        <kp> ap/pitch-kp </kp>
        <ki> ap/pitch-ki </ki>
        <kd> ap/pitch-kd </kd>
        <clipto>
            <min>-1</min>
            <max>1</max>
        </clipto>
      </pid>
      <summer name="ap/pitch-auto">
        <input>ap/elevator-trim</input>
        <input>ap/pitch-pid</input>
        <clipto>
            <min>-1</min>
            <max>1</max>
        </clipto>
      </summer>
      <pure_gain name="ap/liftfan-pitch-auto">
        <input>-ap/pitch-auto</input>
        <gain>0.15</gain>
      </pure_gain>
      <pure_gain name="ap/rcs-pitch-auto">
        <input>ap/pitch-auto</input>
        <gain>0.85</gain>
      </pure_gain>
      <switch name="ap/elevator-cmd-norm">
        <default value="0"/>
        <test value="ap/pitch-auto">
          ap/pitch-enable == 1
        </test>
      </switch>
      <switch name="ap/liftfan-elevator-cmd-norm">
        <default value="fcs/elevator-cmd-norm"/>
        <test value="ap/liftfan-pitch-auto">
          ap/pitch-enable == 1
        </test>
      </switch>
      <switch name="ap/rcs-elevator-cmd-norm">
        <default value="fcs/elevator-cmd-norm"/>
        <test value="ap/rcs-pitch-auto">
          ap/pitch-enable == 1
        </test>
      </switch>
    </channel>

    <channel name="Yaw">
      <summer name="ap/heading-error-deg">
        <input>ap/heading-cmd-deg</input>
        <input>-attitude/psi-deg</input>
      </summer>
      <pid name="ap/yaw-pid">
        <input>ap/heading-error-deg</input>
        <kp> ap/yaw-kp </kp>
        <ki> ap/yaw-ki </ki>
        <kd> ap/yaw-kd </kd>
        <clipto>
            <min>-1</min>
            <max>1</max>
        </clipto>
      </pid>
      <summer name="ap/yaw-auto">
        <input> ap/vane-trim </input>
        <input>ap/yaw-pid</input>
      </summer>
      <pure_gain name="ap/left-vane-cmd-rad">
        <input>ap/yaw-auto</input>
        <gain>-0.1396263</gain>
      </pure_gain>
      <pure_gain name="ap/right-vane-cmd-rad">
        <input>ap/yaw-auto</input>
        <gain>0.1396263</gain>
      </pure_gain>
      <summer name="ap/left-vane-cmd-rad">
        <input>ap/left-vane-cmd-rad</input>
        <bias>1.57079632679</bias>
        <clipto>
          <min>1.43117002679</min>
          <max>1.71042262679</max>
        </clipto>
      </summer>
      <summer name="ap/right-vane-cmd-rad">
        <input>ap/right-vane-cmd-rad</input>
        <bias>1.57079632679</bias>
        <clipto>
          <min>1.43117002679</min>
          <max>1.71042262679</max>
        </clipto>
      </summer>
      <switch name="ap/left-vane-cmd">
        <default value='1.57079632679'/>
        <test value="ap/left-vane-cmd-rad">
          ap/yaw-enable == 1
        </test>
      </switch>
      <switch name="ap/right-vane-cmd">
        <default value='1.57079632679'/>
        <test value="ap/right-vane-cmd-rad">
          ap/yaw-enable == 1
        </test>
      </switch>
    </channel>

    <channel name="Altitude">
      <summer name="ap/h-error">
        <input>ap/h-sl-cmd-ft</input>
        <input>-position/h-sl-ft</input>
      </summer>
      <pure_gain name="ap/theta-deg-cmd">
        <input>ap/h-error</input>
        <gain>ap/h-error-to-theta</gain>
        <clipto>
            <min>-20</min>
            <max>20</max>
        </clipto>
      </pure_gain>
      <summer name="ap/altitude-pitch-error-scaled">
        <input>ap/theta-deg-cmd</input>
        <input>-attitude/theta-deg</input>
      </summer>
      <pid name="ap/h-hover-pid">
        <input>ap/h-error</input>
        <kp> ap/altitude-kp </kp>
        <ki> ap/altitude-ki </ki>
        <kd> ap/altitude-kd </kd>
        <clipto>
            <min>-0.5</min>
            <max>0.5</max>
        </clipto>
      </pid>
      <pid name="ap/h-cruise-pid">
        <input>ap/altitude-pitch-error-scaled</input>
        <kp> ap/altitude-kp </kp>
        <ki> ap/altitude-ki </ki>
        <kd> ap/altitude-kd </kd>
        <clipto>
            <min>-1</min>
            <max>1</max>
        </clipto>
      </pid>
      <summer name="ap/hover-h-auto">
        <input>ap/throttle-trim</input>
        <input>ap/h-hover-pid</input>
        <clipto>
            <min>0</min>
            <max>1</max>
        </clipto>
      </summer>
      <switch name="ap/h-auto">
        <default value="ap/hover-h-auto"/>
        <test value="ap/h-cruise-pid">
          velocities/vt-fps >= 140
        </test>
      </switch>
      <switch name="ap/throttle-cmd-norm">
        <default value="fcs/throttle-cmd-norm"/>
        <test value="ap/h-auto">
          ap/h-hover-enable == 1
        </test>
      </switch>
      <switch name="ap/altitude-cmd-norm">
        <default value="0"/>
        <test value="ap/h-auto">
          ap/h-cruise-enable == 1
        </test>
      </switch>
    </channel>

    <channel name="Speed">
      <summer name="ap/speed-error">
        <input>ap/speed-cmd-fps</input>
        <input>-velocities/vt-fps</input>
      </summer>
      <pid name="ap/speed-pid">
        <input>ap/speed-error</input>
        <kp> ap/speed-kp </kp>
        <ki> ap/speed-ki </ki>
        <kd> ap/speed-kd </kd>
        <clipto>
            <min>-1</min>
            <max>1</max>
        </clipto>
      </pid>
      <summer name="ap/speed-auto">
        <input>ap/speed-trim</input>
        <input>ap/speed-pid</input>
        <clipto>
            <min>0</min>
            <max>1</max>
        </clipto>
      </summer>
      <switch name="ap/speed-cmd-norm">
        <default value="fcs/throttle-cmd-norm"/>
        <test value="ap/speed-auto">
          ap/speed-enable == 1
        </test>
      </switch>
    </channel>

    <!-- ############################################### -->
    <!-- ############## CONTROL SURFACES ############### -->
    <!-- ############################################### -->
    <channel name="Elevator">
      <summer name='fcs/total-elevator-cmd'>
        <input>ap/altitude-cmd-norm</input>
        <input>ap/elevator-cmd-norm</input>
      </summer>
      <pure_gain name='fcs/elevator-pos-deg'>
        <input>fcs/total-elevator-cmd</input>
        <gain>-ap/elevator-pitch-mix</gain>
      </pure_gain>
    </channel>

    <channel name="Left Aileron">
      <pure_gain>
        <input>ap/aileron-cmd-norm</input>
        <gain>ap/aileron-roll-mix</gain>
        <clipto>
          <min>-20</min>
          <max>20</max>
        </clipto>
        <output>fcs/left-aileron-pos-deg</output>
      </pure_gain>
    </channel>

    <channel name="Right Aileron">
      <pure_gain>
        <input>ap/aileron-cmd-norm</input>
        <gain>-ap/aileron-roll-mix</gain>
        <clipto>
          <min>-20</min>
          <max>20</max>
        </clipto>
        <output>fcs/right-aileron-pos-deg</output>
      </pure_gain>
    </channel>

    <channel name="Rudder">
      <pure_gain>
        <input>fcs/rudder-cmd-norm</input>
        <gain>1</gain>
        <output>fcs/rudder-pos-rad</output>
      </pure_gain>
    </channel>

    <channel name="AP Liftfan1">
      <pure_gain name="ap/aileron-to-liftfan1">
        <input>-ap/aileron-cmd-norm</input>
        <gain>ap/liftfan-roll-mix</gain>
      </pure_gain>
      <pure_gain name="ap/elevator-to-liftfan1">
        <input>ap/liftfan-elevator-cmd-norm</input>
        <gain>ap/liftfan-pitch-mix</gain>
      </pure_gain>
      <pure_gain name="ap/throttle-to-liftfan1">
        <input>ap/throttle-cmd-norm</input>
        <gain>ap/lift-fan-thrust-mix</gain>
      </pure_gain>
      <pure_gain name="propulsion/engine[4]/pitch-angle-rad">
        <input>ap/right-vane-cmd</input>
        <gain>ap/liftfan-yaw-mix</gain>
      </pure_gain>
      <summer>
        <input>ap/aileron-to-liftfan1</input>
        <input>ap/elevator-to-liftfan1</input>
        <input>ap/throttle-to-liftfan1</input>
        <output>fcs/throttle-cmd-norm[4]</output>
        <clipto>
          <min>0</min>
          <max>1</max>
        </clipto>
      </summer>
    </channel>

    <channel name="AP Liftfan2">
      <pure_gain name="ap/aileron-to-liftfan2">
        <input>ap/aileron-cmd-norm</input>
        <gain>ap/liftfan-roll-mix</gain>
      </pure_gain>
      <pure_gain name="ap/elevator-to-liftfan2">
        <input>ap/liftfan-elevator-cmd-norm</input>
        <gain>ap/liftfan-pitch-mix</gain>
      </pure_gain>
      <pure_gain name="ap/throttle-to-liftfan2">
        <input>ap/throttle-cmd-norm</input>
        <gain>ap/lift-fan-thrust-mix</gain>
      </pure_gain>
      <pure_gain name="propulsion/engine[5]/pitch-angle-rad">
        <input>ap/left-vane-cmd</input>
        <gain>ap/liftfan-yaw-mix</gain>
      </pure_gain>
      <summer>
        <input>ap/aileron-to-liftfan2</input>
        <input>ap/elevator-to-liftfan2</input>
        <input>ap/throttle-to-liftfan2</input>
        <output>fcs/throttle-cmd-norm[5]</output>
        <clipto>
          <min>0</min>
          <max>1</max>
        </clipto>
      </summer>
    </channel>

    <channel name="AP Liftfan3">
      <pure_gain name="ap/aileron-to-liftfan3">
        <input>-ap/aileron-cmd-norm</input>
        <gain>ap/liftfan-roll-mix</gain>
      </pure_gain>
      <pure_gain name="ap/elevator-to-liftfan3">
        <input>ap/liftfan-elevator-cmd-norm</input>
        <gain>ap/liftfan-pitch-mix</gain>
      </pure_gain>
      <pure_gain name="ap/throttle-to-liftfan3">
        <input>ap/throttle-cmd-norm</input>
        <gain>ap/lift-fan-thrust-mix</gain>
      </pure_gain>
      <pure_gain name="propulsion/engine[6]/pitch-angle-rad">
        <input>ap/right-vane-cmd</input>
        <gain>ap/liftfan-yaw-mix</gain>
      </pure_gain>
      <summer>
        <input>ap/aileron-to-liftfan3</input>
        <input>ap/elevator-to-liftfan3</input>
        <input>ap/throttle-to-liftfan3</input>
        <output>fcs/throttle-cmd-norm[6]</output>
        <clipto>
          <min>0</min>
          <max>1</max>
        </clipto>
      </summer>
    </channel>

    <channel name="AP Liftfan4">
      <pure_gain name="ap/aileron-to-liftfan4">
        <input>ap/aileron-cmd-norm</input>
        <gain>ap/liftfan-roll-mix</gain>
      </pure_gain>
      <pure_gain name="ap/elevator-to-liftfan4">
        <input>ap/liftfan-elevator-cmd-norm</input>
        <gain>ap/liftfan-pitch-mix</gain>
      </pure_gain>
      <pure_gain name="ap/throttle-to-liftfan4">
        <input>ap/throttle-cmd-norm</input>
        <gain>ap/lift-fan-thrust-mix</gain>
      </pure_gain>
      <pure_gain name="propulsion/engine[7]/pitch-angle-rad">
        <input>ap/left-vane-cmd</input>
        <gain>ap/liftfan-yaw-mix</gain>
      </pure_gain>
      <summer>
        <input>ap/aileron-to-liftfan4</input>
        <input>ap/elevator-to-liftfan4</input>
        <input>ap/throttle-to-liftfan4</input>
        <output>fcs/throttle-cmd-norm[7]</output>
        <clipto>
          <min>0</min>
          <max>1</max>
        </clipto>
      </summer>
    </channel>

    <channel name="RCS">
      <pure_gain name="ap/throttle-to-rcs">
        <input>ap/throttle-cmd-norm</input>
        <gain>ap/rcs-thrust-mix</gain>
      </pure_gain>
      <pure_gain name="ap/elevator-to-rcs">
        <input>ap/rcs-elevator-cmd-norm</input>
        <gain>ap/liftfan-pitch-mix</gain>
      </pure_gain>
      <summer>
        <input>ap/elevator-to-rcs</input>
        <input>ap/throttle-to-rcs</input>
        <output>fcs/throttle-cmd-norm[8]</output>
        <clipto>
          <min>0</min>
          <max>1</max>
        </clipto>
      </summer>
    </channel>

    <channel name="Main Engine 1">
      <summer>
        <input>ap/speed-cmd-norm</input>
        <output>fcs/throttle-cmd-norm</output>
        <clipto>
          <min>0</min>
          <max>1</max>
        </clipto>
      </summer>
    </channel>

    <channel name="Main Engine 2">
      <summer>
        <input>ap/speed-cmd-norm</input>
        <output>fcs/throttle-cmd-norm[1]</output>
        <clipto>
          <min>0</min>
          <max>1</max>
        </clipto>
      </summer>
    </channel>

    <channel name="Main Engine 3">
      <summer>
        <input>ap/speed-cmd-norm</input>
        <output>fcs/throttle-cmd-norm[2]</output>
        <clipto>
          <min>0</min>
          <max>1</max>
        </clipto>
      </summer>
    </channel>

    <channel name="Main Engine 4">
      <summer>
        <input>ap/speed-cmd-norm</input>
        <output>fcs/throttle-cmd-norm[3]</output>
        <clipto>
          <min>0</min>
          <max>1</max>
        </clipto>
      </summer>
    </channel>

    <channel name="Throttle Command to Throttle Position">
      <pure_gain name="throttle-pos-norm">
        <input>fcs/throttle-cmd-norm</input>
        <gain>1</gain>
        <output>fcs/throttle-pos-norm</output>
      </pure_gain>
      <pure_gain name="throttle-pos-norm[1]">
        <input>fcs/throttle-cmd-norm[1]</input>
        <gain>1</gain>
        <output>fcs/throttle-pos-norm[1]</output>
      </pure_gain>
      <pure_gain name="throttle-pos-norm[2]">
        <input>fcs/throttle-cmd-norm[2]</input>
        <gain>1</gain>
        <output>fcs/throttle-pos-norm[2]</output>
      </pure_gain>
      <pure_gain name="throttle-pos-norm[3]">
        <input>fcs/throttle-cmd-norm[3]</input>
        <gain>1</gain>
        <output>fcs/throttle-pos-norm[3]</output>
      </pure_gain>
      <pure_gain name="throttle-pos-norm[4]">
        <input>fcs/throttle-cmd-norm[4]</input>
        <gain>1</gain>
        <output>fcs/throttle-pos-norm[4]</output>
      </pure_gain>
      <pure_gain name="throttle-pos-norm[5]">
        <input>fcs/throttle-cmd-norm[5]</input>
        <gain>1</gain>
        <output>fcs/throttle-pos-norm[5]</output>
      </pure_gain>
      <pure_gain name="throttle-pos-norm[6]">
        <input>fcs/throttle-cmd-norm[6]</input>
        <gain>1</gain>
        <output>fcs/throttle-pos-norm[6]</output>
      </pure_gain>
      <pure_gain name="throttle-pos-norm[7]">
        <input>fcs/throttle-cmd-norm[7]</input>
        <gain>1</gain>
        <output>fcs/throttle-pos-norm[7]</output>
      </pure_gain>
      <pure_gain name="throttle-pos-norm[8]">
        <input>fcs/throttle-cmd-norm[8]</input>
        <gain>1</gain>
        <output>fcs/throttle-pos-norm[8]</output>
      </pure_gain>
    </channel>

  </flight_control>
  <!--===================-->
  <!-- AERODYNAMICS -->
  <!--===================-->
  <aerodynamics>
    <axis name="LIFT">
      <function name="aero/coefficient/CLalpha">
        <description>Lift_due_to_alpha</description>
        <product>
          <property>aero/qbar-psf</property>
          <property>metrics/Sw-sqft</property>
          <table>
            <independentVar lookup="row">aero/alpha-rad</independentVar>
            <tableData>
            -3.14          -0.300 <!--Starts at 180 deg-->
            -2.60          -0.800 <!--Kept same value from F-35B in -->
            -2.08          -0.800 <!--Kept same value from F-35B in -->
            -1.57          0.000 <!-- -90 deg, Kept same value from F-35B in -->
            -1.00          -2.000 <!-- -57 deg, Kept same value from F-35B in -->
            -0.20          -0.14064 <!-- -11.45 deg, F-35B value = -1.280, changed to -0.14064 based on linear curvefit -->
            -0.157079633	 -0.339341
            -0.148352986	 -0.293835
            -0.122173048	 -0.157317
            -0.095993109	 -0.020799
            -0.06981317	   0.115726
            -0.043633231	 0.252238
            -0.017453293	 0.388539
            0.008726646	   0.524412
            0.034906585	   0.659645
            0.061086524	   0.794025
            0.087266463	   0.927343
            0.113446401	   1.059396
            0.13962634	   1.189982
            0.165806279	   1.318907
            0.191986218	   1.445984
            0.218166156	   1.57103
            0.244346095	   1.693874
            0.270526034	   1.814349
            0.296705973	   1.932301
            0.322885912	   2.047583
            0.34906585	   2.160059
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            0.52           1.800 <!--Kept same value from F-35B in -->
            0.61           1.800 <!--Kept same value from F-35B in -->
            1.00           1.400 <!--Kept same value from F-35B in -->
            1.20           0.200 <!--Kept same value from F-35B in -->
            1.57           0.000 <!--Kept same value from F-35B in -->
            2.08           0.800 <!--Kept same value from F-35B in -->
            2.60           0.800 <!--Kept same value from F-35B in -->
            3.14           -0.300 <!--Kept same value from F-35B in -->
            </tableData>
          </table>
        </product>
      </function>
      <function name="aero/coefficient/dCLflap">
        <description>Delta_Lift_due_to_flaps</description>
        <product>
          <property>aero/qbar-psf</property>
          <property>metrics/Sw-sqft</property>
          <property>fcs/flap-pos-rad</property>
          <value> 0.66 </value>
        </product>
      </function>
      <function name="aero/coefficient/dCLsb">
        <description>Delta_Lift_due_to_speedbrake</description>
        <product>
          <property>aero/qbar-psf</property>
          <property>metrics/Sw-sqft</property>
          <property>fcs/speedbrake-pos-norm</property>
          <value>0</value>
        </product>
      </function>
      <function name="aero/coefficient/CLde">
        <description>Lift_due_to_Elevator_Deflection</description>
        <product>
          <property>aero/qbar-psf</property>
          <property>metrics/Sw-sqft</property>
          <property>fcs/elevator-pos-rad</property>
          <value>0.2</value>
        </product>
      </function>
    </axis>
    <axis name="DRAG">
      <function name="aero/coefficient/CD0"> <!--This is just CDtot not Parasitic Drag?-->
        <description>Drag_at_zero_lift</description>
        <product>
          <property>aero/qbar-psf</property>
          <property>metrics/Sw-sqft</property>
          <table>
            <independentVar lookup="row">aero/alpha-rad</independentVar>
            <tableData>
             -3.14          0.300 <!--Starts at 180 deg-->
             -1.57          1.500 <!--Kept same value from F-35B in -->
             -0.26          0.240 <!--Kept same value from F-35B in -->
             -0.148352986   0.03291181
             -0.13962634	  0.03288795
             -0.113446401   0.03385989
             -0.087266463	  0.03640331
             -0.061086524	  0.04051719
             -0.034906585	  0.04618973
             -0.008726646	  0.0533984
             0.017453293	  0.06211008
             0.043633231	  0.07228125
             0.06981317	    0.08385826
             0.095993109	  0.09677765
             0.122173048	  0.1109665
             0.148352986	  0.126343
             0.174532925	  0.1428168
             0.200712864	  0.1602895
             0.226892803	  0.1786557
             0.253072742	  0.197803
             0.27925268	    0.2176132
             0.305432619	  0.2379628
             0.331612558	  0.2587238
             0.357792497    0.2797645
             0.383972435	  0.3009504
             0.410152374	  0.3221448
             0.41887902	    0.3291877
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             0.6110         1.0840 <!--Kept same value from F-35B in -->
             0.6980         1.3260 <!--Kept same value from F-35B in -->
             0.7850         1.4780 <!--Kept same value from F-35B in -->
             1.57           1.500  <!--Kept same value from F-35B in -->
             3.14           0.300  <!--Kept same value from F-35B in -->
            </tableData>
          </table>
        </product>
      </function>
      <function name="aero/coefficient/CDi">
        <description>Induced_drag</description>
        <product>
          <property>aero/qbar-psf</property>
          <property>metrics/Sw-sqft</property> <!--deleted cl^2 multiplier?-->
          <table>
            <independentVar lookup="row">aero/alpha-rad</independentVar>
            <tableData>
             -0.148352986	0.003160076 <!--starts at -8.5 degrees, do we need to put cases up to 3.14 rad?-->
             -0.13962634	0.003136216
             -0.130899694	0.003285968
             -0.104719755	0.00478118
             -0.078539816	0.007848733
             -0.052359878	0.01248401
             -0.026179939	0.01867162
             0.00	        0.02638549
             0.026179939	0.03558901
             0.052359878	0.04623525
             0.078539816	0.05826724
             0.104719755	0.07161835
             0.130899694	0.08621262
             0.157079633	0.1019653
             0.183259571	0.1187834
             0.20943951	  0.136566
             0.235619449	0.1552053
             0.261799388	0.174587
             0.287979327	0.194591
             0.314159265	0.2150921
             0.340339204	0.2359612
             0.366519143	0.2570653
             0.392699082	0.2782693
             0.41887902	  0.299436
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            </tableData>
          </table>
        </product>
      </function>
      <function name="aero/coefficient/CDmach">
        <description>Drag_due_to_mach</description>
        <product>
          <property>aero/qbar-psf</property>
          <property>metrics/Sw-sqft</property>
          <table>
            <independentVar lookup="row">velocities/mach</independentVar>
            <tableData>
                0.00      0.000
                0.81      0.000
                1.10      0.023
                1.80      0.015
            </tableData>
          </table>
        </product>
      </function>
      <function name="aero/coefficient/CDflap">
        <description>Drag_due_to_flaps</description>
        <product>
          <property>aero/qbar-psf</property>
          <property>metrics/Sw-sqft</property>
          <property>fcs/flap-pos-rad</property>
          <value> 0.15219 </value> <!--NEEDS FIXING, LEFT CURRENT VALUE IN-->
        </product>
      </function>
      <function name="aero/coefficient/CDgear">
        <description>Drag_due_to_gear</description>
        <product>
          <property>aero/qbar-psf</property>
          <property>metrics/Sw-sqft</property>
          <property>gear/gear-pos-norm</property>
          <value>0.02</value> <!--ASSUMED SAME, LEFT CURRENT VALUE IN-->
        </product>
      </function>
      <function name="aero/coefficient/CDsb">
        <description>Drag_due_to_speedbrakes</description>
        <product>
          <property>aero/qbar-psf</property>
          <property>metrics/Sw-sqft</property>
          <property>fcs/speedbrake-pos-norm</property>
          <value>0.021</value> <!--NO SPEEDBRAKES, spoilers?-->
        </product>
      </function>
      <!-- <function name="aero/coefficient/CDft">
        <description>Drag_due_to_fan_trap</description>
        <product>
          <property>aero/qbar-psf</property>
          <property>metrics/Sw-sqft</property>
          <table>
            <independentVar lookup="row">fcs/mixture-pos-norm</independentVar>
            <tableData>
              0 1
              1 0
            </tableData>
          </table>
          <value>0.031</value>
        </product>
      </function> -->
      <function name="aero/coefficient/CDbeta">
        <description>Drag_due_to_sideslip</description>
        <product>
          <property>aero/qbar-psf</property>
          <property>metrics/Sw-sqft</property>
          <table>
            <independentVar lookup="row">aero/beta-rad</independentVar>
            <tableData>
              -1.57       0.947
              -0.6981     0.1228
              -0.52259    0.0771
              -0.34906    0.0476
              -0.24434    0.03615
              -0.10472    0.02726
               0.00       0.0
               0.10472    0.02726
               0.24434    0.03615
               0.34906    0.0476
               0.52259    0.0772
               0.6981     0.1485
               1.57       0.947
            </tableData>
          </table>
        </product>
      </function>
      <function name="aero/coefficient/CDde">
        <description>Drag_due_to_Elevator_Deflection</description>
        <product>
          <property>aero/qbar-psf</property>
          <property>metrics/Sw-sqft</property>
          <abs>
            <property>fcs/elevator-pos-norm</property>
          </abs>
          <value>0.04</value> <!--NEEDS FIXING, LEFT CURRENT VALUE IN-->
        </product>
      </function>
    </axis>
    <axis name="SIDE">
      <function name="aero/coefficient/CYb">
        <description>Side_force_due_to_beta</description>
        <product>
          <property>aero/qbar-psf</property>
          <property>metrics/Sw-sqft</property>
          <property>aero/beta-rad</property>
          <value>-0.38158</value>
        </product>
      </function>
    </axis>
    <axis name="ROLL">
      <function name="aero/coefficient/Clb">
        <description>Roll_moment_due_to_beta</description>
        <product>
          <property>aero/qbar-psf</property>
          <property>metrics/Sw-sqft</property>
          <property>metrics/bw-ft</property>
          <property>aero/beta-rad</property>
          <value>-0.01</value>
        </product>
      </function>
      <function name="aero/coefficient/Clp">
        <description>Roll_moment_due_to_roll_rate</description>
        <product>
          <property>aero/qbar-psf</property>
          <property>metrics/Sw-sqft</property>
          <property>metrics/bw-ft</property>
          <property>aero/bi2vel</property>
          <property>velocities/p-aero-rad_sec</property>
          <value>-0.49857</value>
        </product>
      </function>
      <function name="aero/coefficient/Clr">
        <description>Roll_moment_due_to_yaw_rate</description>
        <product>
          <property>aero/qbar-psf</property>
          <property>metrics/Sw-sqft</property>
          <property>metrics/bw-ft</property>
          <property>aero/bi2vel</property>
          <property>velocities/r-aero-rad_sec</property>
          <value>0.40033</value>
        </product>
      </function>
      <function name="aero/coefficient/Clda">
        <description>Roll_moment_due_to_aileron</description>
        <product>
          <property>aero/qbar-psf</property>
          <property>metrics/Sw-sqft</property>
          <property>metrics/bw-ft</property>
          <property>fcs/left-aileron-pos-rad</property>
          <value>0.0492</value> <!--NEEDS FIXING, F-35 Value: 1.5, Ours: 0.0492-->
          <!-- to match real datas -->
          <table>
            <independentVar lookup="row">velocities/mach</independentVar>
            <tableData>
              0.0    0.110
              1.0    0.067
            </tableData>
          </table>
        </product>
      </function>
      <function name="aero/coefficient/Cldr">
        <description>Roll_moment_due_to_rudder</description>
        <product>
          <property>aero/qbar-psf</property>
          <property>metrics/Sw-sqft</property>
          <property>metrics/bw-ft</property>
          <property>fcs/rudder-pos-rad</property>
          <value>0.050133</value>
        </product>
      </function>
    </axis>
    <axis name="PITCH">
      <function name="aero/coefficient/Cmalpha">
        <description>Pitch_moment_due_to_alpha</description>
        <sum>
          <value>0.1295</value> <!-- Cm0 --> <!--SOLVED FOR ON XFLR5-->
          <product>
            <property>aero/qbar-psf</property>
            <property>metrics/Sw-sqft</property>
            <property>metrics/cbarw-ft</property>
            <property>aero/alpha-rad</property>
            <value>-2.6</value> <!--NEEDS FIXING?, F-35B VALUE: -0.3, ours -3.616 1/rad -->
          </product>
        </sum>
      </function>
      <function name="aero/coefficient/Cmde">
        <description>Pitch_moment_due_to_elevator</description>
        <product>
          <property>aero/qbar-psf</property>
          <property>metrics/Sw-sqft</property>
          <property>metrics/cbarw-ft</property>
          <property>fcs/elevator-pos-rad</property>
          <table>
            <independentVar lookup="row">velocities/mach</independentVar>
            <tableData>
              0.0     -1.1924
              2.0     -0.200
            </tableData>
          </table>
        </product>
      </function>
      <function name="aero/coefficient/Cmq">
        <description>Pitch_moment_due_to_pitch_rate</description>
        <product>
          <property>aero/qbar-psf</property>
          <property>metrics/Sw-sqft</property>
          <property>metrics/cbarw-ft</property>
          <property>aero/ci2vel</property>
          <property>velocities/q-aero-rad_sec</property>
          <value>-12.45</value>
        </product>
      </function>
      <function name="aero/coefficient/Cmadot">
        <description>Pitch_moment_due_to_alpha_rate</description>
        <product>
          <property>aero/qbar-psf</property>
          <property>metrics/Sw-sqft</property>
          <property>metrics/cbarw-ft</property>
          <property>aero/ci2vel</property>
          <property>aero/alphadot-rad_sec</property>
          <value>-4.4936</value>
        </product>
      </function>
    </axis>
    <axis name="YAW">
      <function name="aero/coefficient/Cnb">
        <description>Yaw_moment_due_to_beta</description>
        <product>
          <property>aero/qbar-psf</property>
          <property>metrics/Sw-sqft</property>
          <property>metrics/bw-ft</property>
          <property>aero/beta-rad</property>
          <value>0.13</value>
        </product>
      </function>
      <function name="aero/coefficient/Cnr">
        <description>Yaw_moment_due_to_yaw_rate</description>
        <product>
          <property>aero/qbar-psf</property>
          <property>metrics/Sw-sqft</property>
          <property>metrics/bw-ft</property>
          <property>aero/bi2vel</property>
          <property>velocities/r-aero-rad_sec</property>
          <value>-0.39142</value>
        </product>
      </function>
      <function name="aero/coefficient/Cndr">
        <description>Yaw_moment_due_to_rudder</description>
        <product>
          <property>aero/qbar-psf</property>
          <property>metrics/Sw-sqft</property>
          <property>metrics/bw-ft</property>
          <property>fcs/rudder-pos-rad</property>
          <value>0.48354</value>
        </product>
      </function>
      <function name="aero/coefficient/Cnda">
        <description>Adverse_yaw</description>
        <product>
          <property>aero/qbar-psf</property>
          <property>metrics/Sw-sqft</property>
          <property>metrics/bw-ft</property>
          <property>fcs/left-aileron-pos-rad</property>
          <value>-0.010071</value>
        </product>
      </function>
    </axis>
  </aerodynamics>
</fdm_config>
<!-- vim: set et ft=xml fenc=utf-8 ff=unix sts=0 sw=2 ts=2 : -->
