<?xml version="1.0"?>
<!--
  File:     PW-530.xml
  Author:   AAE 451 Team 1

  Inputs:
    name:           PW-530
    type:           turbine
    thrust:         2887 lb
    augmented?      no
    injected?       no
-->

<turbine_engine name="PW-530">
  <milthrust> 2887.0 </milthrust>
  <bypassratio>     3.7 </bypassratio>
  <tsfc>            0.446 </tsfc>
  <bleed>           0.03</bleed>
  <idlen1>         30.0 </idlen1>
  <idlen2>         60.0 </idlen2>
  <maxn1>         100.0 </maxn1>
  <maxn2>         100.0 </maxn2>
  <augmented>         0 </augmented>
  <augmethod>         0 </augmethod>
  <injected>          0 </injected>

  <function name="IdleThrust">
   <table>
    <independentVar lookup="row">velocities/mach</independentVar>
    <independentVar lookup="column">atmosphere/density-altitude</independentVar>
    <tableData>
         -10000     0     10000   20000   30000   40000   50000   60000
     0.0  0.0420  0.0436  0.0528  0.0694  0.0899  0.1183  0.1467  0.0
     0.2  0.0500  0.0501  0.0335  0.0544  0.0797  0.1049  0.1342  0.0
     0.4  0.0040  0.0047  0.0020  0.0272  0.0595  0.0891  0.1203  0.0
     0.6  0.0     0.0     0.0     0.0     0.0276  0.0718  0.1073  0.0
     0.8  0.0     0.0     0.0     0.0     0.0174  0.0468  0.0900  0.0
     1.0  0.0     0.0     0.0     0.0     0.0     0.0422  0.0700  0.0
    </tableData>
   </table>
  </function>

  <function name="MilThrust">
   <table>
    <independentVar lookup="row">velocities/mach</independentVar>
    <independentVar lookup="column">atmosphere/density-altitude</independentVar>
    <tableData>
          -10000       0       10000     20000     30000     40000     50000     60000
     0.0   1.1851    1.0000    0.8337    0.6854    0.5544    0.4313    0.3232    0.2423
     0.2   1.1377    0.9600    0.8003    0.6580    0.5322    0.4140    0.3103    0.2326
     0.4   1.0903    0.9200    0.7670    0.6306    0.5100    0.3968    0.2974    0.2229
     0.6   1.0429    0.8800    0.7336    0.6032    0.4879    0.3795    0.2844    0.2132
     0.8   0.9955    0.8400    0.7003    0.5757    0.4657    0.3623    0.2715    0.2035
     1.0   0.9481    0.8000    0.6669    0.5483    0.4435    0.3450    0.2586    0.1938
     1.2   0.9006    0.7600    0.6336    0.5209    0.4213    0.3278    0.2457    0.1841
    </tableData>
   </table>
  </function>
</turbine_engine>
