<?xml version="1.0"?>
<?xml-stylesheet type="text/xsl" href="http://jsbsim.sourceforge.net/JSBSim.xsl"?>
<fdm_config xmlns:xsi="http://www.w3.org/2001/XMLSchema-instance" name="AAE 451 Team 1" version="2.0" release="TRIAL" xsi:noNamespaceSchemaLocation="http://jsbsim.sourceforge.net/JSBSim.xsd">
  <fileheader>
    <author> AAE 451 Team 1 </author>
    <filecreationdate> 2021-3-24 </filecreationdate>
    <version> 1.0 </version>
    <license>
      <licenseName>GPL (General Public License)</licenseName>
      <licenseURL>http://www.gnu.org/licenses/gpl.html</licenseURL>
    </license>
    <description> Models a XV-3 </description>
  </fileheader>
  <!-- ALL VALUES DEFINED FROM 8FT IN FRONT OF NOSE-->
  <metrics>
    <wingarea unit="FT2">  373.615 </wingarea>
    <wingspan unit="FT">   52 </wingspan>
    <wing_incidence>       0 </wing_incidence>
    <chord unit="FT">   7.184 </chord> <!-- Cbar (8.95+5.785)/2 = 7.3675, using Thomas's value -->
    <htailarea unit="FT2">   116.2690 </htailarea>
    <htailarm unit="FT">   20.4 </htailarm> <!-- CG to AC -->
    <vtailarea unit="FT2">   67.9979 </vtailarea>
    <vtailarm unit="FT">   20.5 </vtailarm> <!-- CG to AC -->
    <location name="AERORP" unit="FT"> <!-- neutral point (location where aerodynamic forces act)-->
      <x> 27.53 </x>
      <y>   0.00 </y>
      <z>   0.00 </z>
    </location>
    <location name="EYEPOINT" unit="FT"> <!-- where G-forces are computed for the pilot -->
      <x> 11.5 </x>
      <y>   0.00 </y>
      <z>  3 </z>
    </location>
    <location name="VRP" unit="IN"> <!-- the world position reported by JSBSim to FlightGear is for this location in the structural frame-->
      <x>0</x>
      <y>0</y>
      <z>20</z>
    </location>
  </metrics>
  <!-- All Locations Measured from 8ft in front of nose-->
  <mass_balance>
    <ixx unit="SLUG*FT2">     39078.458 </ixx>
    <iyy unit="SLUG*FT2">     52433.260 </iyy>
    <izz unit="SLUG*FT2">     87170.629 </izz>
    <emptywt unit="LBS">     12813 </emptywt> <!-- from CAD -->
    <location name="CG" unit="FT">
      <x> 25.8 </x> <!--Empty CG (Loaded CG = 26.478FT)-->
      <y> 0.00 </y>
      <z> -1.14 </z>
    </location>
  </mass_balance>
  <ground_reactions>
    <contact type="BOGEY" name="NOSE">
      <location unit="IN">
        <x>  79.85 </x>
        <y>   0.00 </y>
        <z> -73.70 </z>
      </location>
      <static_friction>  0.80 </static_friction>
      <dynamic_friction> 0.50 </dynamic_friction>
      <rolling_friction> 0.02 </rolling_friction>
      <spring_coeff unit="LBS/FT">      10000.00 </spring_coeff>
      <damping_coeff unit="LBS/FT/SEC">  2000.00 </damping_coeff>
      <max_steer unit="DEG"> 45.00 </max_steer>
      <brake_group>NONE</brake_group>
      <retractable>1</retractable>
    </contact>
    <contact type="BOGEY" name="LEFT_MAIN">
      <location unit="IN">
        <x> 383.26 </x>
        <y> -77.92 </y>
        <z> -73.70 </z>
      </location>
      <static_friction>  0.8 </static_friction> <!-- Originally 0.8-->
      <dynamic_friction> 0.50 </dynamic_friction>
      <rolling_friction> 0.02 </rolling_friction>
      <spring_coeff unit="LBS/FT">      30000.00 </spring_coeff>
      <damping_coeff unit="LBS/FT/SEC"> 6000.00 </damping_coeff>
      <max_steer unit="DEG">0</max_steer>
      <brake_group>LEFT</brake_group>
      <retractable>1</retractable>
    </contact>
    <contact type="BOGEY" name="RIGHT_MAIN">
      <location unit="IN">
        <x> 383.26 </x>
        <y>  77.92 </y>
        <z> -73.70 </z>
      </location>
      <static_friction>  0.8 </static_friction> <!-- Originally 0.8-->
      <dynamic_friction> 0.50 </dynamic_friction>
      <rolling_friction> 0.02 </rolling_friction>
      <spring_coeff unit="LBS/FT">      30000.00 </spring_coeff>
      <damping_coeff unit="LBS/FT/SEC"> 6000.00 </damping_coeff>
      <max_steer unit="DEG">0</max_steer>
      <brake_group>RIGHT</brake_group>
      <retractable>1</retractable>
    </contact>
    <contact type="STRUCTURE" name="LEFT_WING">
      <location unit="IN">
        <x> 368.52 </x>
        <y> -17.55 </y>
        <z> -15.36 </z>
      </location>
      <static_friction>  0.80 </static_friction>
      <dynamic_friction> 0.50 </dynamic_friction>
      <spring_coeff unit="LBS/FT">      59535.00 </spring_coeff>
      <damping_coeff unit="LBS/FT/SEC"> 11907.00 </damping_coeff>
    </contact>
    <contact type="STRUCTURE" name="RIGHT_WING">
      <location unit="IN">
        <x> 368.52 </x>
        <y>  17.55 </y>
        <z> -15.36 </z>
      </location>
      <static_friction>  0.80 </static_friction>
      <dynamic_friction> 0.50 </dynamic_friction>
      <spring_coeff unit="LBS/FT">      59535.00 </spring_coeff>
      <damping_coeff unit="LBS/FT/SEC"> 11907.00 </damping_coeff>
    </contact>
  </ground_reactions>
  <!--===================-->
  <!-- PROPULSION -->
  <!--===================-->
  <propulsion>
    <!-- MAIN ENGINES -->
    <engine file="PW-530">
      <location unit="IN">
        <x> 283.6 </x>
        <y>  47.93 </y>
        <z>   -58.16 </z>
      </location>
      <orient unit="DEG">
        <pitch> 0.00 </pitch>
        <roll>   0.00 </roll>
        <yaw>   0.00 </yaw>
      </orient>
      <feed>0</feed>
      <feed>1</feed>
      <feed>2</feed>
      <feed>3</feed>
      <feed>4</feed>
      <thruster file="direct">
        <location unit="IN">
          <x> 283.6 </x>
          <y>   47.93 </y>
          <z>   -58.16 </z>
        </location>
        <orient unit="DEG">
          <pitch> 0.00 </pitch>
          <roll>   0.00 </roll>
          <yaw>   0.00 </yaw>
        </orient>
      </thruster>
    </engine>
    <engine file="PW-530">
      <location unit="IN">
        <x> 283.6 </x>
        <y>  -47.93 </y>
        <z>   -58.16 </z>
      </location>
      <orient unit="DEG">
        <pitch> 0.00 </pitch>
        <roll>   0.00 </roll>
        <yaw>   0.00 </yaw>
      </orient>
      <feed>0</feed>
      <feed>1</feed>
      <feed>2</feed>
      <feed>3</feed>
      <feed>4</feed>
      <thruster file="direct">
        <location unit="IN">
          <x> 283.6 </x>
          <y>   -47.93 </y>
          <z>   -58.16 </z>
        </location>
        <orient unit="DEG">
          <pitch> 0.00 </pitch>
          <roll>   0.00 </roll>
          <yaw>   0.00 </yaw>
        </orient>
      </thruster>
    </engine>
    <engine file="PW-530">
      <location unit="IN">
        <x> 294.6 </x>
        <y>  170.33 </y>
        <z>   -53.16 </z>
      </location>
      <orient unit="DEG">
        <pitch> 0.00 </pitch>
        <roll>   0.00 </roll>
        <yaw>   0.00 </yaw>
      </orient>
      <feed>0</feed>
      <feed>1</feed>
      <feed>2</feed>
      <feed>3</feed>
      <feed>4</feed>
      <thruster file="direct">
        <location unit="IN">
          <x> 294.6 </x>
          <y>  170.33 </y>
          <z>   -53.16 </z>
        </location>
        <orient unit="DEG">
          <pitch> 0.00 </pitch>
          <roll>   0.00 </roll>
          <yaw>   0.00 </yaw>
        </orient>
      </thruster>
    </engine>
    <engine file="PW-530">
      <location unit="IN">
        <x> 294.6 </x>
        <y>  -170.33 </y>
        <z>   -53.16 </z>
      </location>
      <orient unit="DEG">
        <pitch> 0.00 </pitch>
        <roll>   0.00 </roll>
        <yaw>   0.00 </yaw>
      </orient>
      <feed>0</feed>
      <feed>1</feed>
      <feed>2</feed>
      <feed>3</feed>
      <feed>4</feed>
      <thruster file="direct">
        <location unit="IN">
          <x> 294.6 </x>
          <y>  -170.33 </y>
          <z>   -53.16 </z>
        </location>
        <orient unit="DEG">
          <pitch> 0.00 </pitch>
          <roll>   0.00 </roll>
          <yaw>   0.00 </yaw>
        </orient>
      </thruster>
    </engine>
    <!-- LIFT FANS -->
    <engine file="liftfan"> <!-- Right Inner -->
      <location unit="IN">
        <x> 324 </x>
        <y>   86.54 </y>
        <z>   -20.44 </z>
      </location>
      <orient unit="DEG">
        <pitch> 90.00 </pitch>
        <roll>   0.00 </roll>
        <yaw>   0.00 </yaw>
      </orient>
      <feed>0</feed>
      <feed>1</feed>
      <feed>2</feed>
      <feed>3</feed>
      <feed>4</feed>
      <thruster file="direct">
        <location unit="IN">
          <x> 324 </x>
          <y>   86.54 </y>
          <z>   -20.44 </z>
        </location>
        <orient unit="DEG">
          <pitch> 90.00 </pitch>
          <roll>   0.00 </roll>
          <yaw>   0.00 </yaw>
        </orient>
      </thruster>
    </engine>
    <engine file="liftfan"> <!-- Left Inner -->
      <location unit="IN">
        <x> 324 </x>
        <y>   -86.54 </y>
        <z>   -20.44 </z>
      </location>
      <orient unit="DEG">
        <pitch> 90.00 </pitch>
        <roll>   0.00 </roll>
        <yaw>   0.00 </yaw>
      </orient>
      <feed>0</feed>
      <feed>1</feed>
      <feed>2</feed>
      <feed>3</feed>
      <feed>4</feed>
      <thruster file="direct">
        <location unit="IN">
          <x> 324 </x>
          <y>   -86.54 </y>
          <z>   -20.44 </z>
        </location>
        <orient unit="DEG">
          <pitch> 90.00 </pitch>
          <roll>   0.00 </roll>
          <yaw>   0.00 </yaw>
        </orient>
      </thruster>
    </engine>
    <engine file="liftfan"> <!-- Right Outer -->
      <location unit="IN">
        <x> 328.2 </x>
        <y>   130.13 </y>
        <z>   -20.44 </z>
      </location>
      <orient unit="DEG">
        <pitch> 90.00 </pitch>
        <roll>   0.00 </roll>
        <yaw>   0.00 </yaw>
      </orient>
      <feed>0</feed>
      <feed>1</feed>
      <feed>2</feed>
      <feed>3</feed>
      <feed>4</feed>
      <thruster file="direct">
        <location unit="IN">
          <x> 328.2 </x>
          <y>   130.13 </y>
          <z>   -20.44 </z>
        </location>
        <orient unit="DEG">
          <pitch> 90.00 </pitch>
          <roll>   0.00 </roll>
          <yaw>   0.00 </yaw>
        </orient>
      </thruster>
    </engine>
    <engine file="liftfan"> <!-- Left Outer -->
      <location unit="IN">
        <x> 328.2 </x>
        <y>   -130.13 </y>
        <z>   -20.44 </z>
      </location>
      <orient unit="DEG">
        <pitch> 90.00 </pitch>
        <roll>   0.00 </roll>
        <yaw>   0.00 </yaw>
      </orient>
      <feed>0</feed>
      <feed>1</feed>
      <feed>2</feed>
      <feed>3</feed>
      <feed>4</feed>
      <thruster file="direct">
        <location unit="IN">
          <x> 328.2 </x>
          <y>   -130.13 </y>
          <z>   -20.44 </z>
        </location>
        <orient unit="DEG">
          <pitch> 90.00 </pitch>
          <roll>   0.00 </roll>
          <yaw>   0.00 </yaw>
        </orient>
      </thruster>
    </engine>
    <!-- RCS -->
    <engine file="RCS">
      <location unit="IN">
        <x> 108 </x>
        <y>  0 </y>
        <z>   0 </z>
      </location>
      <orient unit="DEG">
        <pitch> 90.00 </pitch>
        <roll>   0.00 </roll>
        <yaw>   0.00 </yaw>
      </orient>
      <feed>0</feed>
      <feed>1</feed>
      <feed>2</feed>
      <feed>3</feed>
      <feed>4</feed>
      <thruster file="direct">
        <location unit="IN">
          <x> 108 </x>
          <y>  0 </y>
          <z>   0 </z>
        </location>
        <orient unit="DEG">
          <pitch> 90.00 </pitch>
          <roll>   0.00 </roll>
          <yaw>   0.00 </yaw>
        </orient>
      </thruster>
    </engine>
    <!-- FUEL TANKS-->
    <!-- Wing Tank number 0 -->
    <tank type="FUEL">
      <location unit="FT">
        <x> 30.43 </x>
        <y>  18.06 </y>
        <z> 1.49 </z>
      </location>
      <capacity unit="LBS"> 299.7 </capacity>
      <contents unit="LBS"> 299.7 </contents>
    </tank>
    <!-- Wing Tank number 1 -->
    <tank type="FUEL">
      <location unit="FT">
        <x> 30.43 </x>
        <y>  -18.06 </y>
        <z> 1.49 </z>
      </location>
      <capacity unit="LBS"> 299.7 </capacity>
      <contents unit="LBS"> 299.7 </contents>
    </tank>
    <!-- Wing Tank number 2 -->
    <tank type="FUEL">
      <location unit="FT">
        <x> 27.29 </x>
        <y>  3.5 </y>
        <z> 1.55 </z>
      </location>
      <capacity unit="LBS"> 1039 </capacity>
      <contents unit="LBS"> 1039 </contents>
    </tank>
    <!-- Wing Tank number 3 -->
    <tank type="FUEL">
      <location unit="FT">
        <x> 27.29 </x>
        <y> -3.5 </y>
        <z> 1.55 </z>
      </location>
      <capacity unit="LBS"> 1039 </capacity>
      <contents unit="LBS"> 1039 </contents>
    </tank>
    <!-- Empennage Tank number 4 -->
    <tank type="FUEL">
      <location unit="FT">
        <x> 37.05 </x>
        <y> 0 </y>
        <z> 1.29 </z>
      </location>
      <capacity unit="LBS"> 422.6 </capacity>
      <contents unit="LBS"> 422.6 </contents>
    </tank>
  </propulsion>
  <!--===================-->
  <!-- FLIGHT CONTROL -->
  <!--===================-->
  <flight_control>

    <channel name="Gear">
      <pure_gain>
        <input>gear/gear-cmd-norm</input>
        <gain>1</gain>
        <output>gear/gear-pos-norm</output>
      </pure_gain>
    </channel>

    <channel name="Elevator">
      <pure_gain>
        <input>fcs/elevator-cmd-norm</input>
        <gain>-1</gain>
        <output>fcs/elevator-pos-rad</output>
      </pure_gain>
    </channel>

    <channel name="Left Aileron">
      <pure_gain>
        <input>fcs/aileron-cmd-norm</input>
        <gain>-1</gain>
        <output>fcs/left-aileron-pos-rad</output>
      </pure_gain>
    </channel>

    <channel name="Right Aileron">
      <pure_gain>
        <input>fcs/aileron-cmd-norm</input>
        <gain>1</gain>
        <output>fcs/right-aileron-pos-rad</output>
      </pure_gain>
    </channel>

    <channel name="Rudder">
      <pure_gain>
        <input>fcs/rudder-cmd-norm</input>
        <gain>1</gain>
        <output>fcs/rudder-pos-rad</output>
      </pure_gain>
    </channel>

    <channel name="Throttle">
      <pure_gain name="throttle-pos-norm">
        <input>fcs/throttle-cmd-norm</input>
        <gain>1</gain>
        <output>fcs/throttle-pos-norm</output>
      </pure_gain>
      <pure_gain name="throttle-pos-norm[1]">
        <input>fcs/throttle-cmd-norm[1]</input>
        <gain>1</gain>
        <output>fcs/throttle-pos-norm[1]</output>
      </pure_gain>
      <pure_gain name="throttle-pos-norm[2]">
        <input>fcs/throttle-cmd-norm[2]</input>
        <gain>1</gain>
        <output>fcs/throttle-pos-norm[2]</output>
      </pure_gain>
      <pure_gain name="throttle-pos-norm[3]">
        <input>fcs/throttle-cmd-norm[3]</input>
        <gain>1</gain>
        <output>fcs/throttle-pos-norm[3]</output>
      </pure_gain>
      <pure_gain name="throttle-pos-norm[4]">
        <input>fcs/throttle-cmd-norm[4]</input>
        <gain>1</gain>
        <output>fcs/throttle-pos-norm[4]</output>
      </pure_gain>
      <pure_gain name="throttle-pos-norm[5]">
        <input>fcs/throttle-cmd-norm[5]</input>
        <gain>1</gain>
        <output>fcs/throttle-pos-norm[5]</output>
      </pure_gain>
      <pure_gain name="throttle-pos-norm[6]">
        <input>fcs/throttle-cmd-norm[6]</input>
        <gain>1</gain>
        <output>fcs/throttle-pos-norm[6]</output>
      </pure_gain>
      <pure_gain name="throttle-pos-norm[7]">
        <input>fcs/throttle-cmd-norm[7]</input>
        <gain>1</gain>
        <output>fcs/throttle-pos-norm[7]</output>
      </pure_gain>
      <pure_gain name="throttle-pos-norm[8]">
        <input>fcs/throttle-cmd-norm[8]</input>
        <gain>1</gain>
        <output>fcs/throttle-pos-norm[8]</output>
      </pure_gain>
    </channel>

    <!-- <channel name="Engine0">
      <pure_gain name="fcs/elevator_to_engine0">
        <input>fcs/elevator-cmd-norm</input>
        <gain>0.1</gain>
      </pure_gain>
      <pure_gain name="fcs/throttle_to_engine0">
        <input>fcs/throttle-cmd-norm</input>
        <gain>0.9</gain>
      </pure_gain>
      <summer>
        <input>fcs/elevator_to_engine0</input>
        <input>fcs/throttle_to_engine0</input>
        <output>fcs/throttle-pos-norm</output>
      </summer>
    </channel>

    <channel name="Engine0_Yaw">
      <pure_gain name="fcs/rudder_to_engine0_yaw">
        <input>fcs/rudder-cmd-norm</input>
        <gain>0.1</gain>
        <output>propulsion/engine/yaw-angle-rad</output>
      </pure_gain>
    </channel>

    <channel name="Engine1">
      <pure_gain name="fcs/elevator_to_engine1">
        <input>fcs/elevator-cmd-norm</input>
        <gain>-0.1</gain>
      </pure_gain>
      <pure_gain name="fcs/throttle_to_engine1">
        <input>fcs/throttle-cmd-norm</input>
        <gain>0.9</gain>
      </pure_gain>
      <summer>
        <input>fcs/elevator_to_engine1</input>
        <input>fcs/throttle_to_engine1</input>
        <output>fcs/throttle-pos-norm[1]</output>
      </summer>
    </channel>

    <channel name="Engine2">
      <pure_gain name="fcs/aileron_to_engine2">
        <input>fcs/aileron-cmd-norm</input>
        <gain>0.1</gain>
      </pure_gain>
      <pure_gain name="fcs/throttle_to_engine2">
        <input>fcs/throttle-cmd-norm</input>
        <gain>0.9</gain>
      </pure_gain>
      <summer>
        <input>fcs/aileron_to_engine2</input>
        <input>fcs/throttle_to_engine2</input>
        <output>fcs/throttle-pos-norm[2]</output>
      </summer>
    </channel>

    <channel name="Engine3">
      <pure_gain name="fcs/aileron_to_engine3">
        <input>fcs/aileron-cmd-norm</input>
        <gain>-0.1</gain>
      </pure_gain>
      <pure_gain name="fcs/throttle_to_engine3">
        <input>fcs/throttle-cmd-norm</input>
        <gain>0.9</gain>
      </pure_gain>
      <summer>
        <input>fcs/aileron_to_engine3</input>
        <input>fcs/throttle_to_engine3</input>
        <output>fcs/throttle-pos-norm[3]</output>
      </summer>
    </channel> -->
  </flight_control>
  <!--===================-->
  <!-- AERODYNAMICS -->
  <!--===================-->
  <aerodynamics>
    <axis name="LIFT">
      <function name="aero/coefficient/CLalpha">
        <description>Lift_due_to_alpha</description>
        <product>
          <property>aero/qbar-psf</property>
          <property>metrics/Sw-sqft</property>
          <table>
            <independentVar lookup="row">aero/alpha-rad</independentVar>
            <tableData>
             -3.14 -0.300 <!--Starts at 180 deg-->
             -2.60 -0.800 <!--Kept same value from F-35B in -->
             -2.08 -0.800 <!--Kept same value from F-35B in -->
             -1.57 0.000 <!-- -90 deg, Kept same value from F-35B in -->
             -1.00 -2.000 <!-- -57 deg, Kept same value from F-35B in -->
             -0.20 -0.14064 <!-- -11.45 deg, F-35B value = -1.280, changed to -0.14064 based on linear curvefit -->
             -0.148352986	  0.04383389
             -0.13962634	  0.08948034
             -0.113446401	  0.2264763
             -0.087266463	  0.3633882
             -0.061086524	  0.4999984
             -0.034906585	  0.6360898
             -0.008726646	  0.771447
             0.017453293	  0.9058565
             0.043633231	  1.039108
             0.06981317	    1.170997
             0.095993109	  1.301321
             0.122173048	  1.429885
             0.148352986	  1.556501
             0.174532925	  1.680987
             0.200712864	  1.803171
             0.226892803	  1.922886
             0.253072742	  2.039979
             0.27925268	    2.154303
             0.305432619	  2.265723
             0.331612558	  2.374116
             0.340339204	  2.409554
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             0.34906585	    2.444639 <!-- 20 deg, Predicted Stall Point Approaching -->
             0.357792497	  2.479367 <!-- 20.5 deg, Predicted Stall Point Approaching -->
             0.52           1.800 <!--Kept same value from F-35B in -->
             0.61           1.800 <!--Kept same value from F-35B in -->
             1.00           1.400 <!--Kept same value from F-35B in -->
             1.20           0.200 <!--Kept same value from F-35B in -->
             1.57           0.000 <!--Kept same value from F-35B in -->
             2.08           0.800 <!--Kept same value from F-35B in -->
             2.60           0.800 <!--Kept same value from F-35B in -->
             3.14           -0.300 <!--Kept same value from F-35B in -->
            </tableData>
          </table>
        </product>
      </function>
      <function name="aero/coefficient/dCLflap">
        <description>Delta_Lift_due_to_flaps</description>
        <product>
          <property>aero/qbar-psf</property>
          <property>metrics/Sw-sqft</property>
          <property>fcs/flap-pos-rad</property>
          <value> 0.67144 </value>
        </product>
      </function>
      <function name="aero/coefficient/dCLsb">
        <description>Delta_Lift_due_to_speedbrake</description>
        <product>
          <property>aero/qbar-psf</property>
          <property>metrics/Sw-sqft</property>
          <property>fcs/speedbrake-pos-norm</property>
          <value>0</value>
        </product>
      </function>
      <function name="aero/coefficient/CLde">
        <description>Lift_due_to_Elevator_Deflection</description>
        <product>
          <property>aero/qbar-psf</property>
          <property>metrics/Sw-sqft</property>
          <property>fcs/elevator-pos-rad</property>
          <value>0.45603</value>
        </product>
      </function>
    </axis>
    <axis name="DRAG">
      <function name="aero/coefficient/CD0"> <!--This is just CDtot not Parasitic Drag?-->
        <description>Drag_at_zero_lift</description>
        <product>
          <property>aero/qbar-psf</property>
          <property>metrics/Sw-sqft</property>
          <table>
            <independentVar lookup="row">aero/alpha-rad</independentVar>
            <tableData>
             -3.14          0.300 <!--Starts at 180 deg-->
             -1.57          1.500 <!--Kept same value from F-35B in -->
             -0.26          0.240 <!--Kept same value from F-35B in -->
             -0.148352986   0.03291181
             -0.13962634	  0.03288795
             -0.113446401   0.03385989
             -0.087266463	  0.03640331
             -0.061086524	  0.04051719
             -0.034906585	  0.04618973
             -0.008726646	  0.0533984
             0.017453293	  0.06211008
             0.043633231	  0.07228125
             0.06981317	    0.08385826
             0.095993109	  0.09677765
             0.122173048	  0.1109665
             0.148352986	  0.126343
             0.174532925	  0.1428168
             0.200712864	  0.1602895
             0.226892803	  0.1786557
             0.253072742	  0.197803
             0.27925268	    0.2176132
             0.305432619	  0.2379628
             0.331612558	  0.2587238
             0.357792497    0.2797645
             0.383972435	  0.3009504
             0.410152374	  0.3221448
             0.41887902	    0.3291877
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             0.6110         1.0840 <!--Kept same value from F-35B in -->
             0.6980         1.3260 <!--Kept same value from F-35B in -->
             0.7850         1.4780 <!--Kept same value from F-35B in -->
             1.57           1.500  <!--Kept same value from F-35B in -->
             3.14           0.300  <!--Kept same value from F-35B in -->
            </tableData>
          </table>
        </product>
      </function>
      <function name="aero/coefficient/CDi">
        <description>Induced_drag</description>
        <product>
          <property>aero/qbar-psf</property>
          <property>metrics/Sw-sqft</property> <!--deleted cl^2 multiplier?-->
          <table>
            <independentVar lookup="row">aero/alpha-rad</independentVar>
            <tableData>
             -0.148352986	0.003160076 <!--starts at -8.5 degrees, do we need to put cases up to 3.14 rad?-->
             -0.13962634	0.003136216
             -0.130899694	0.003285968
             -0.104719755	0.00478118
             -0.078539816	0.007848733
             -0.052359878	0.01248401
             -0.026179939	0.01867162
             0.00	        0.02638549
             0.026179939	0.03558901
             0.052359878	0.04623525
             0.078539816	0.05826724
             0.104719755	0.07161835
             0.130899694	0.08621262
             0.157079633	0.1019653
             0.183259571	0.1187834
             0.20943951	  0.136566
             0.235619449	0.1552053
             0.261799388	0.174587
             0.287979327	0.194591
             0.314159265	0.2150921
             0.340339204	0.2359612
             0.366519143	0.2570653
             0.392699082	0.2782693
             0.41887902	  0.299436
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            </tableData>
          </table>
        </product>
      </function>
      <function name="aero/coefficient/CDmach">
        <description>Drag_due_to_mach</description>
        <product>
          <property>aero/qbar-psf</property>
          <property>metrics/Sw-sqft</property>
          <table>
            <independentVar lookup="row">velocities/mach</independentVar>
            <tableData>
                0.00      0.000
                0.81      0.000
                1.10      0.023
                1.80      0.015
            </tableData>
          </table>
        </product>
      </function>
      <function name="aero/coefficient/CDflap">
        <description>Drag_due_to_flaps</description>
        <product>
          <property>aero/qbar-psf</property>
          <property>metrics/Sw-sqft</property>
          <property>fcs/flap-pos-rad</property>
          <value> 0.15219 </value> <!--NEEDS FIXING, LEFT CURRENT VALUE IN-->
        </product>
      </function>
      <function name="aero/coefficient/CDgear">
        <description>Drag_due_to_gear</description>
        <product>
          <property>aero/qbar-psf</property>
          <property>metrics/Sw-sqft</property>
          <property>gear/gear-pos-norm</property>
          <value>0.02</value> <!--ASSUMED SAME, LEFT CURRENT VALUE IN-->
        </product>
      </function>
      <function name="aero/coefficient/CDsb">
        <description>Drag_due_to_speedbrakes</description>
        <product>
          <property>aero/qbar-psf</property>
          <property>metrics/Sw-sqft</property>
          <property>fcs/speedbrake-pos-norm</property>
          <value>0</value> <!--NO SPEEDBRAKES, spoilers?-->
        </product>
      </function>
      <function name="aero/coefficient/CDbeta">
        <description>Drag_due_to_sideslip</description>
        <product>
          <property>aero/qbar-psf</property>
          <property>metrics/Sw-sqft</property>
          <table>
            <independentVar lookup="row">aero/beta-rad</independentVar>
            <tableData>
              -1.57       0.947
              -0.6981     0.1228
              -0.52259    0.0771
              -0.34906    0.0476
              -0.24434    0.03615
              -0.10472    0.02726
               0.00       0.02507
               0.10472    0.02726
               0.24434    0.03615
               0.34906    0.0476
               0.52259    0.0772
               0.6981     0.1485
               1.57       0.947
            </tableData>
          </table>
        </product>
      </function>
      <function name="aero/coefficient/CDde">
        <description>Drag_due_to_Elevator_Deflection</description>
        <product>
          <property>aero/qbar-psf</property>
          <property>metrics/Sw-sqft</property>
          <abs>
            <property>fcs/elevator-pos-norm</property>
          </abs>
          <value>0.04</value> <!--NEEDS FIXING, LEFT CURRENT VALUE IN-->
        </product>
      </function>
    </axis>
    <axis name="SIDE">
      <function name="aero/coefficient/CYb">
        <description>Side_force_due_to_beta</description>
        <product>
          <property>aero/qbar-psf</property>
          <property>metrics/Sw-sqft</property>
          <property>aero/beta-rad</property>
          <value>-0.38158</value>
        </product>
      </function>
    </axis>
    <axis name="ROLL">
      <function name="aero/coefficient/Clb">
        <description>Roll_moment_due_to_beta</description>
        <product>
          <property>aero/qbar-psf</property>
          <property>metrics/Sw-sqft</property>
          <property>metrics/bw-ft</property>
          <property>aero/beta-rad</property>
          <value>-0.17154</value>
        </product>
      </function>
      <function name="aero/coefficient/Clp">
        <description>Roll_moment_due_to_roll_rate</description>
        <product>
          <property>aero/qbar-psf</property>
          <property>metrics/Sw-sqft</property>
          <property>metrics/bw-ft</property>
          <property>aero/bi2vel</property>
          <property>velocities/p-aero-rad_sec</property>
          <value>-0.49857</value>
        </product>
      </function>
      <function name="aero/coefficient/Clr">
        <description>Roll_moment_due_to_yaw_rate</description>
        <product>
          <property>aero/qbar-psf</property>
          <property>metrics/Sw-sqft</property>
          <property>metrics/bw-ft</property>
          <property>aero/bi2vel</property>
          <property>velocities/r-aero-rad_sec</property>
          <value>0.40033</value>
        </product>
      </function>
      <function name="aero/coefficient/Clda">
        <description>Roll_moment_due_to_aileron</description>
        <product>
          <property>aero/qbar-psf</property>
          <property>metrics/Sw-sqft</property>
          <property>metrics/bw-ft</property>
          <property>fcs/left-aileron-pos-rad</property>
          <value>0.031473</value> <!--NEEDS FIXING, F-35 Value: 1.5, Ours: 0.031473-->
          <!-- to match real datas -->
          <table>
            <independentVar lookup="row">velocities/mach</independentVar>
            <tableData>
              0.0    0.110
              1.0    0.067
            </tableData>
          </table>
        </product>
      </function>
      <function name="aero/coefficient/Cldr">
        <description>Roll_moment_due_to_rudder</description>
        <product>
          <property>aero/qbar-psf</property>
          <property>metrics/Sw-sqft</property>
          <property>metrics/bw-ft</property>
          <property>fcs/rudder-pos-rad</property>
          <value>0.050133</value>
        </product>
      </function>
    </axis>
    <axis name="PITCH">
      <function name="aero/coefficient/Cmalpha">
        <description>Pitch_moment_due_to_alpha</description>
        <sum>
          <value>0.0409</value> <!-- Cm0 --> <!--SOLVED FOR ON XFLR5-->
          <product>
            <property>aero/qbar-psf</property>
            <property>metrics/Sw-sqft</property>
            <property>metrics/cbarw-ft</property>
            <property>aero/alpha-rad</property>
            <value>-3.616</value> <!--NEEDS FIXING?, F-35B VALUE: -0.3, ours -3.616 1/rad -->
          </product>
        </sum>
      </function>
      <function name="aero/coefficient/Cmde">
        <description>Pitch_moment_due_to_elevator</description>
        <product>
          <property>aero/qbar-psf</property>
          <property>metrics/Sw-sqft</property>
          <property>metrics/cbarw-ft</property>
          <property>fcs/elevator-pos-rad</property>
          <table>
            <independentVar lookup="row">velocities/mach</independentVar>
            <tableData>
              0.0     -1.1924
              2.0     -0.200
            </tableData>
          </table>
        </product>
      </function>
      <function name="aero/coefficient/Cmq">
        <description>Pitch_moment_due_to_pitch_rate</description>
        <product>
          <property>aero/qbar-psf</property>
          <property>metrics/Sw-sqft</property>
          <property>metrics/cbarw-ft</property>
          <property>aero/ci2vel</property>
          <property>velocities/q-aero-rad_sec</property>
          <value>-12.45</value>
        </product>
      </function>
      <function name="aero/coefficient/Cmadot">
        <description>Pitch_moment_due_to_alpha_rate</description>
        <product>
          <property>aero/qbar-psf</property>
          <property>metrics/Sw-sqft</property>
          <property>metrics/cbarw-ft</property>
          <property>aero/ci2vel</property>
          <property>aero/alphadot-rad_sec</property>
          <value>-4.4936</value>
        </product>
      </function>
    </axis>
    <axis name="YAW">
      <function name="aero/coefficient/Cnb">
        <description>Yaw_moment_due_to_beta</description>
        <product>
          <property>aero/qbar-psf</property>
          <property>metrics/Sw-sqft</property>
          <property>metrics/bw-ft</property>
          <property>aero/beta-rad</property>
          <value>0.13</value>
        </product>
      </function>
      <function name="aero/coefficient/Cnr">
        <description>Yaw_moment_due_to_yaw_rate</description>
        <product>
          <property>aero/qbar-psf</property>
          <property>metrics/Sw-sqft</property>
          <property>metrics/bw-ft</property>
          <property>aero/bi2vel</property>
          <property>velocities/r-aero-rad_sec</property>
          <value>-0.39142</value>
        </product>
      </function>
      <function name="aero/coefficient/Cndr">
        <description>Yaw_moment_due_to_rudder</description>
        <product>
          <property>aero/qbar-psf</property>
          <property>metrics/Sw-sqft</property>
          <property>metrics/bw-ft</property>
          <property>fcs/rudder-pos-rad</property>
          <value>0.48354</value>
        </product>
      </function>
      <function name="aero/coefficient/Cnda">
        <description>Adverse_yaw</description>
        <product>
          <property>aero/qbar-psf</property>
          <property>metrics/Sw-sqft</property>
          <property>metrics/bw-ft</property>
          <property>fcs/left-aileron-pos-rad</property>
          <value>-0.010071</value>
        </product>
      </function>
    </axis>
  </aerodynamics>
</fdm_config>
<!-- vim: set et ft=xml fenc=utf-8 ff=unix sts=0 sw=2 ts=2 : -->
